# Начальные данные
Vср := 0.14
λ := 5.8
n1 := 0.53
ω := 2*π*n1 = 3.33009
f := 2*π/3
P_C1 := 490.5
P_C2max := 686.7
F_mmax := 490.5
F_g := 245.25
# 1.1 Определение размеров механизма
l_AO := Vср/(4*n1) = 0.0660377
l_AB := λ*l_AO = 0.383019
l_AS2 := l_AB*0.275 = 0.10533
# 2. Вычисление передаточных функций механизма
# 2.1. Функции положения.
X_A(φ) := -l_AO*cos(φ)
X_A(f) = 0.0330189
Y_A(φ) := l_AO*sin(φ)
Y_A(f) = 0.0571904
φ_2(φ) := asin(sin(φ)*l_AO/l_AB)
φ_2(f) = 0.149875
X_B(φ) := l_AB*cos(φ_2(φ)) + X_A(φ)
X_B(f) = 0.411744
Y_B(φ) := 0
Y_B(f) = 0
X_S2(φ) := X_A(φ) + l_AS2*cos(φ_2(φ))
X_S2(f) = 0.137168
Y_S2(φ) := Y_A(φ) - l_AS2*sin(φ_2(φ))
Y_S2(f) = 0.041463
# 2.2. Кинематические передаточные функции
# скорости (аналоги скоростей):
V_qS2X(φ) := ω*d/dφ(X_S2(φ))
V_qS2X(f) = 0.195015
V_qS2Y(φ) := ω*d/dφ(Y_S2(φ))
V_qS2Y(f) = -0.0797179
V_qS2(φ) := sqrt(V_qS2X(φ)^2 + V_qS2Y(φ)^2)
V_qS2(f) = 0.210679
V_qAX(φ) := ω*d/dφ(X_A(φ))
V_qAX(f) = 0.190449
V_qAY(φ) := ω*d/dφ(Y_A(φ))
V_qAY(f) = -0.109956
V_qA(φ) := sqrt(V_qAX(φ)^2 + V_qAY(φ)^2)
V_qA(f) = 0.219911
V_qBX(φ) := ω*d/dφ(X_B(φ))
V_qBX(f) = 0.207053
V_qB(φ) := |V_qBX(φ)|
V_qB(f) = 0.207053
ω_q2(φ) := (ω*d/dφ(φ_2(φ)))
ω_q2(f) = -0.290331
φ := 0, .05 .. 2*π
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X := [X_B(f); X_S2(f); X_A(f); 0]
Y := [Y_B(f); Y_S2(f); Y_A(f); 0]
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# 1.3 Построение графика силы Pc
b := 0
k := 0
# 1)Pc2
L_1 := 2*X_B(π) = 0.898113
Given
k*0 + b == -P_C2max
k*L_1 + b == 0
res := Find(k, b) = [764.603; -686.7]
K_2 := res[0] = 764.603
B_2 := res[1] = -686.7
# 1)Pc3
Given
k*0 + b == -7.35
k*0.132 + b == -22.7
K_3 := res[0] = 764.603
res := Find(k, b) = [-116.288; -7.35]
B_3 := res[1] = -7.35
P_C2(φ) := B_2*X_B(φ) + K_2
P_C3(φ) := B_3*X_B(φ) + K_3
P_C2(0) = 546.932
P_C2(π) = 456.236
φ := 0, .05 .. 2*π
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